<neuroml xmlns="http://www.neuroml.org/schema/neuroml2"  xmlns:xs="http://www.w3.org/2001/XMLSchema" xmlns:xsi="http://www.w3.org/2001/XMLSchema-instance" xsi:schemaLocation="http://www.neuroml.org/schema/neuroml2 https://raw.github.com/NeuroML/NeuroML2/development/Schemas/NeuroML2/NeuroML_v2beta4.xsd" id="CortexDemoHH">
    <include href="HHCell.cell.nml"></include>
    <include href="AMPAR.synapse.nml"></include>
    <include href="GABAA.synapse.nml"></include>
    <poissonFiringSynapse id="input_70Hz" synapse="AMPAR" averageRate="70 per_s" spikeTarget="./AMPAR"/>
    <network id="CortexDemoHH" type="networkWithTemperature" temperature="32.0 degC">
        <notes>Network generated using libNeuroML v0.2.10</notes>
        <population id="Exc" type="populationList" component="HHCell" size="50">
            <instance id="0">
                <location y="44.073259917500003" x="193.290707137999988" z="1.49829401172"/>
            </instance>
            <instance id="1">
                <location y="93.926899736400003" x="182.195192490000011" z="116.445514611999997"/>
            </instance>
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        </population>
        <population id="Inh" type="populationList" component="HHCell" size="20">
            <instance id="0">
                <location y="68.5270090235" x="84.407373247999999" z="169.381769227000007"/>
            </instance>
            <instance id="1">
                <location y="9.28688255276" x="167.753557164" z="52.063152608300001"/>
            </instance>
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        </population>
        <projection id="NetConn_Exc_Exc" postsynapticPopulation="Exc" presynapticPopulation="Exc" synapse="AMPAR">
            <connection id="0" preFractionAlong="0.5" preCellId="../Exc/0/HHCell" postFractionAlong="0.5" postSegmentId="0" postCellId="../Exc/1/HHCell" preSegmentId="0"/>
            <connection id="1" preFractionAlong="0.5" preCellId="../Exc/0/HHCell" postFractionAlong="0.5" postSegmentId="0" postCellId="../Exc/4/HHCell" preSegmentId="0"/>
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        </projection>
        <projection id="NetConn_Exc_Inh" postsynapticPopulation="Inh" presynapticPopulation="Exc" synapse="AMPAR">
            <connection id="0" preFractionAlong="0.5" preCellId="../Exc/0/HHCell" postFractionAlong="0.5" postSegmentId="0" postCellId="../Inh/1/HHCell" preSegmentId="0"/>
            <connection id="1" preFractionAlong="0.5" preCellId="../Exc/0/HHCell" postFractionAlong="0.5" postSegmentId="0" postCellId="../Inh/2/HHCell" preSegmentId="0"/>
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        </projection>
        <projection id="NetConn_Inh_Exc" postsynapticPopulation="Exc" presynapticPopulation="Inh" synapse="GABAA">
            <connection id="0" preFractionAlong="0.5" preCellId="../Inh/1/HHCell" postFractionAlong="0.5" postSegmentId="0" postCellId="../Exc/0/HHCell" preSegmentId="0"/>
            <connection id="1" preFractionAlong="0.5" preCellId="../Inh/3/HHCell" postFractionAlong="0.5" postSegmentId="0" postCellId="../Exc/0/HHCell" preSegmentId="0"/>
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        </projection>
        <projection id="NetConn_Inh_Inh" postsynapticPopulation="Inh" presynapticPopulation="Inh" synapse="GABAA">
            <connection id="0" preFractionAlong="0.5" preCellId="../Inh/18/HHCell" postFractionAlong="0.5" postSegmentId="0" postCellId="../Inh/0/HHCell" preSegmentId="0"/>
            <connection id="1" preFractionAlong="0.5" preCellId="../Inh/6/HHCell" postFractionAlong="0.5" postSegmentId="0" postCellId="../Inh/1/HHCell" preSegmentId="0"/>
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        </projection>
        <inputList id="Input_0" component="input_70Hz" population="Exc">
            <input destination="synapses" id="0" target="../Exc/0/HHCell"/>
            <input destination="synapses" id="0" target="../Exc/0/HHCell"/>
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        </inputList>
    </network>
</neuroml>
