<Lems>

    <!--

        This LEMS file has been automatically generated using PyNeuroML v0.0.5

     -->

    <!-- Specify which component to run -->
    <Target component="Sim_CortexDemoHH"/>

    <!-- Include core NeuroML2 ComponentType definitions -->
    <Include file="Cells.xml"/>
    <Include file="Networks.xml"/>
    <Include file="Simulation.xml"/>

    <Include file="HHCell.cell.nml"/>
    <Include file="HHCell.cell.nml"/>
    <Include file="CortexDemoHH.net.nml"/>
    <Include file="HHCell.cell.nml"/>
    <Include file="AMPAR.synapse.nml"/>
    <Include file="GABAA.synapse.nml"/>

    <Simulation id="Sim_CortexDemoHH" length="300ms" step="0.05ms" target="CortexDemoHH">

        <Display id="display_exc" title="Voltages Exc cells" timeScale="1ms" xmin="-30.0" xmax="330.0" ymin="-80" ymax="50">
            <Line id="Exc 0: Vm" quantity="Exc/0/HHCell/v" scale="1mV" color="#13c69c" timeScale="1ms"/>
            <Line id="Exc 1: Vm" quantity="Exc/1/HHCell/v" scale="1mV" color="#cfc969" timeScale="1ms"/>
            <Line id="Exc 2: Vm" quantity="Exc/2/HHCell/v" scale="1mV" color="#71818a" timeScale="1ms"/>
            <Line id="Exc 3: Vm" quantity="Exc/3/HHCell/v" scale="1mV" color="#ccd6ea" timeScale="1ms"/>
            <Line id="Exc 4: Vm" quantity="Exc/4/HHCell/v" scale="1mV" color="#7b1a3b" timeScale="1ms"/>
            <Line id="Exc 5: Vm" quantity="Exc/5/HHCell/v" scale="1mV" color="#ce1ff8" timeScale="1ms"/>
            <Line id="Exc 6: Vm" quantity="Exc/6/HHCell/v" scale="1mV" color="#9a8dab" timeScale="1ms"/>
            <Line id="Exc 7: Vm" quantity="Exc/7/HHCell/v" scale="1mV" color="#45d3a1" timeScale="1ms"/>
            <Line id="Exc 8: Vm" quantity="Exc/8/HHCell/v" scale="1mV" color="#c3eeba" timeScale="1ms"/>
            <Line id="Exc 9: Vm" quantity="Exc/9/HHCell/v" scale="1mV" color="#3785f0" timeScale="1ms"/>
            <Line id="Exc 10: Vm" quantity="Exc/10/HHCell/v" scale="1mV" color="#b888d3" timeScale="1ms"/>
            <Line id="Exc 11: Vm" quantity="Exc/11/HHCell/v" scale="1mV" color="#3225d3" timeScale="1ms"/>
            <Line id="Exc 12: Vm" quantity="Exc/12/HHCell/v" scale="1mV" color="#74a74b" timeScale="1ms"/>
            <Line id="Exc 13: Vm" quantity="Exc/13/HHCell/v" scale="1mV" color="#7f60d1" timeScale="1ms"/>
            <Line id="Exc 14: Vm" quantity="Exc/14/HHCell/v" scale="1mV" color="#72669f" timeScale="1ms"/>
            <Line id="Exc 15: Vm" quantity="Exc/15/HHCell/v" scale="1mV" color="#22d084" timeScale="1ms"/>
            <Line id="Exc 16: Vm" quantity="Exc/16/HHCell/v" scale="1mV" color="#544fd8" timeScale="1ms"/>
            <Line id="Exc 17: Vm" quantity="Exc/17/HHCell/v" scale="1mV" color="#a01e82" timeScale="1ms"/>
            <Line id="Exc 18: Vm" quantity="Exc/18/HHCell/v" scale="1mV" color="#128652" timeScale="1ms"/>
            <Line id="Exc 19: Vm" quantity="Exc/19/HHCell/v" scale="1mV" color="#1d92bc" timeScale="1ms"/>
            <Line id="Exc 20: Vm" quantity="Exc/20/HHCell/v" scale="1mV" color="#332d1b" timeScale="1ms"/>
            <Line id="Exc 21: Vm" quantity="Exc/21/HHCell/v" scale="1mV" color="#a20fa4" timeScale="1ms"/>
            <Line id="Exc 22: Vm" quantity="Exc/22/HHCell/v" scale="1mV" color="#f40721" timeScale="1ms"/>
            <Line id="Exc 23: Vm" quantity="Exc/23/HHCell/v" scale="1mV" color="#39e911" timeScale="1ms"/>
            <Line id="Exc 24: Vm" quantity="Exc/24/HHCell/v" scale="1mV" color="#84a6f8" timeScale="1ms"/>
            <Line id="Exc 25: Vm" quantity="Exc/25/HHCell/v" scale="1mV" color="#52c795" timeScale="1ms"/>
            <Line id="Exc 26: Vm" quantity="Exc/26/HHCell/v" scale="1mV" color="#b5f25b" timeScale="1ms"/>
            <Line id="Exc 27: Vm" quantity="Exc/27/HHCell/v" scale="1mV" color="#5189b8" timeScale="1ms"/>
            <Line id="Exc 28: Vm" quantity="Exc/28/HHCell/v" scale="1mV" color="#c34b14" timeScale="1ms"/>
            <Line id="Exc 29: Vm" quantity="Exc/29/HHCell/v" scale="1mV" color="#d6ecbf" timeScale="1ms"/>
            <Line id="Exc 30: Vm" quantity="Exc/30/HHCell/v" scale="1mV" color="#37fcdd" timeScale="1ms"/>
            <Line id="Exc 31: Vm" quantity="Exc/31/HHCell/v" scale="1mV" color="#54ddf0" timeScale="1ms"/>
            <Line id="Exc 32: Vm" quantity="Exc/32/HHCell/v" scale="1mV" color="#df8e1b" timeScale="1ms"/>
            <Line id="Exc 33: Vm" quantity="Exc/33/HHCell/v" scale="1mV" color="#f1e00f" timeScale="1ms"/>
            <Line id="Exc 34: Vm" quantity="Exc/34/HHCell/v" scale="1mV" color="#8fb06c" timeScale="1ms"/>
            <Line id="Exc 35: Vm" quantity="Exc/35/HHCell/v" scale="1mV" color="#7f1c4a" timeScale="1ms"/>
            <Line id="Exc 36: Vm" quantity="Exc/36/HHCell/v" scale="1mV" color="#f49642" timeScale="1ms"/>
            <Line id="Exc 37: Vm" quantity="Exc/37/HHCell/v" scale="1mV" color="#c9c637" timeScale="1ms"/>
            <Line id="Exc 38: Vm" quantity="Exc/38/HHCell/v" scale="1mV" color="#27bf7a" timeScale="1ms"/>
            <Line id="Exc 39: Vm" quantity="Exc/39/HHCell/v" scale="1mV" color="#92d7bb" timeScale="1ms"/>
        </Display>

        <Display id="display_inh" title="Voltages Inh cells" timeScale="1ms" xmin="-30.0" xmax="330.0" ymin="-80" ymax="50">
            <Line id="Inh 0: Vm" quantity="Inh/0/HHCell/v" scale="1mV" color="#69bdc7" timeScale="1ms"/>
            <Line id="Inh 1: Vm" quantity="Inh/1/HHCell/v" scale="1mV" color="#3fb6c2" timeScale="1ms"/>
            <Line id="Inh 2: Vm" quantity="Inh/2/HHCell/v" scale="1mV" color="#e882f2" timeScale="1ms"/>
            <Line id="Inh 3: Vm" quantity="Inh/3/HHCell/v" scale="1mV" color="#c81fb6" timeScale="1ms"/>
            <Line id="Inh 4: Vm" quantity="Inh/4/HHCell/v" scale="1mV" color="#fb2cd5" timeScale="1ms"/>
            <Line id="Inh 5: Vm" quantity="Inh/5/HHCell/v" scale="1mV" color="#8c3ffa" timeScale="1ms"/>
            <Line id="Inh 6: Vm" quantity="Inh/6/HHCell/v" scale="1mV" color="#b4eda8" timeScale="1ms"/>
            <Line id="Inh 7: Vm" quantity="Inh/7/HHCell/v" scale="1mV" color="#450437" timeScale="1ms"/>
            <Line id="Inh 8: Vm" quantity="Inh/8/HHCell/v" scale="1mV" color="#771184" timeScale="1ms"/>
            <Line id="Inh 9: Vm" quantity="Inh/9/HHCell/v" scale="1mV" color="#c42556" timeScale="1ms"/>
            <Line id="Inh 10: Vm" quantity="Inh/10/HHCell/v" scale="1mV" color="#53f7c1" timeScale="1ms"/>
            <Line id="Inh 11: Vm" quantity="Inh/11/HHCell/v" scale="1mV" color="#32951f" timeScale="1ms"/>
            <Line id="Inh 12: Vm" quantity="Inh/12/HHCell/v" scale="1mV" color="#476940" timeScale="1ms"/>
            <Line id="Inh 13: Vm" quantity="Inh/13/HHCell/v" scale="1mV" color="#ecec5e" timeScale="1ms"/>
            <Line id="Inh 14: Vm" quantity="Inh/14/HHCell/v" scale="1mV" color="#77e3be" timeScale="1ms"/>
            <Line id="Inh 15: Vm" quantity="Inh/15/HHCell/v" scale="1mV" color="#0170a5" timeScale="1ms"/>
            <Line id="Inh 16: Vm" quantity="Inh/16/HHCell/v" scale="1mV" color="#758aa3" timeScale="1ms"/>
            <Line id="Inh 17: Vm" quantity="Inh/17/HHCell/v" scale="1mV" color="#73f4a0" timeScale="1ms"/>
            <Line id="Inh 18: Vm" quantity="Inh/18/HHCell/v" scale="1mV" color="#d8e780" timeScale="1ms"/>
            <Line id="Inh 19: Vm" quantity="Inh/19/HHCell/v" scale="1mV" color="#fa144a" timeScale="1ms"/>
        </Display>

        <OutputFile id="Volts_file_exc" fileName="v_exc.dat">
            <OutputColumn id="v_0" quantity="Exc/0/HHCell/v"/>
            <OutputColumn id="v_1" quantity="Exc/1/HHCell/v"/>
            <OutputColumn id="v_2" quantity="Exc/2/HHCell/v"/>
            <OutputColumn id="v_3" quantity="Exc/3/HHCell/v"/>
            <OutputColumn id="v_4" quantity="Exc/4/HHCell/v"/>
            <OutputColumn id="v_5" quantity="Exc/5/HHCell/v"/>
            <OutputColumn id="v_6" quantity="Exc/6/HHCell/v"/>
            <OutputColumn id="v_7" quantity="Exc/7/HHCell/v"/>
            <OutputColumn id="v_8" quantity="Exc/8/HHCell/v"/>
            <OutputColumn id="v_9" quantity="Exc/9/HHCell/v"/>
            <OutputColumn id="v_10" quantity="Exc/10/HHCell/v"/>
            <OutputColumn id="v_11" quantity="Exc/11/HHCell/v"/>
            <OutputColumn id="v_12" quantity="Exc/12/HHCell/v"/>
            <OutputColumn id="v_13" quantity="Exc/13/HHCell/v"/>
            <OutputColumn id="v_14" quantity="Exc/14/HHCell/v"/>
            <OutputColumn id="v_15" quantity="Exc/15/HHCell/v"/>
            <OutputColumn id="v_16" quantity="Exc/16/HHCell/v"/>
            <OutputColumn id="v_17" quantity="Exc/17/HHCell/v"/>
            <OutputColumn id="v_18" quantity="Exc/18/HHCell/v"/>
            <OutputColumn id="v_19" quantity="Exc/19/HHCell/v"/>
            <OutputColumn id="v_20" quantity="Exc/20/HHCell/v"/>
            <OutputColumn id="v_21" quantity="Exc/21/HHCell/v"/>
            <OutputColumn id="v_22" quantity="Exc/22/HHCell/v"/>
            <OutputColumn id="v_23" quantity="Exc/23/HHCell/v"/>
            <OutputColumn id="v_24" quantity="Exc/24/HHCell/v"/>
            <OutputColumn id="v_25" quantity="Exc/25/HHCell/v"/>
            <OutputColumn id="v_26" quantity="Exc/26/HHCell/v"/>
            <OutputColumn id="v_27" quantity="Exc/27/HHCell/v"/>
            <OutputColumn id="v_28" quantity="Exc/28/HHCell/v"/>
            <OutputColumn id="v_29" quantity="Exc/29/HHCell/v"/>
            <OutputColumn id="v_30" quantity="Exc/30/HHCell/v"/>
            <OutputColumn id="v_31" quantity="Exc/31/HHCell/v"/>
            <OutputColumn id="v_32" quantity="Exc/32/HHCell/v"/>
            <OutputColumn id="v_33" quantity="Exc/33/HHCell/v"/>
            <OutputColumn id="v_34" quantity="Exc/34/HHCell/v"/>
            <OutputColumn id="v_35" quantity="Exc/35/HHCell/v"/>
            <OutputColumn id="v_36" quantity="Exc/36/HHCell/v"/>
            <OutputColumn id="v_37" quantity="Exc/37/HHCell/v"/>
            <OutputColumn id="v_38" quantity="Exc/38/HHCell/v"/>
            <OutputColumn id="v_39" quantity="Exc/39/HHCell/v"/>
        </OutputFile>

        <OutputFile id="Volts_file_inh" fileName="v_inh.dat">
            <OutputColumn id="v_0" quantity="Inh/0/HHCell/v"/>
            <OutputColumn id="v_1" quantity="Inh/1/HHCell/v"/>
            <OutputColumn id="v_2" quantity="Inh/2/HHCell/v"/>
            <OutputColumn id="v_3" quantity="Inh/3/HHCell/v"/>
            <OutputColumn id="v_4" quantity="Inh/4/HHCell/v"/>
            <OutputColumn id="v_5" quantity="Inh/5/HHCell/v"/>
            <OutputColumn id="v_6" quantity="Inh/6/HHCell/v"/>
            <OutputColumn id="v_7" quantity="Inh/7/HHCell/v"/>
            <OutputColumn id="v_8" quantity="Inh/8/HHCell/v"/>
            <OutputColumn id="v_9" quantity="Inh/9/HHCell/v"/>
            <OutputColumn id="v_10" quantity="Inh/10/HHCell/v"/>
            <OutputColumn id="v_11" quantity="Inh/11/HHCell/v"/>
            <OutputColumn id="v_12" quantity="Inh/12/HHCell/v"/>
            <OutputColumn id="v_13" quantity="Inh/13/HHCell/v"/>
            <OutputColumn id="v_14" quantity="Inh/14/HHCell/v"/>
            <OutputColumn id="v_15" quantity="Inh/15/HHCell/v"/>
            <OutputColumn id="v_16" quantity="Inh/16/HHCell/v"/>
            <OutputColumn id="v_17" quantity="Inh/17/HHCell/v"/>
            <OutputColumn id="v_18" quantity="Inh/18/HHCell/v"/>
            <OutputColumn id="v_19" quantity="Inh/19/HHCell/v"/>
        </OutputFile>

    </Simulation>

</Lems>
